// COMSOL Multiphysics 5.0.0.243 model "concentration.mph"
// Outline of the model tree

Geometry
  geom1 "Geometry 1" (2D, length unit µm)
    sq1: Square | pos = {-30, -30}; type = solid; base = corner; size = 60
    c1: Circle | pos = {0, 0}; type = solid; base = center; r = 0.1
    r1: Rectangle | pos = {-20, 16}; type = solid; base = corner; size = {4, 4}
    sq2: Square | pos = {6, 6}; type = solid; base = corner; size = 4
    sq3: Square | pos = {20, -9}; type = solid; base = corner; size = 4
    sq4: Square | pos = {-20, -15}; type = solid; base = corner; size = 4
    fil1: Fillet | point = r1(1) entities 1-4; sq2(1) entities 1-4; sq3(1) entities 1-4; sq4(1) entities 1-4; radius = 1.5
    dif1: Difference | input = sq1; input2 = fil1
    fin: Finalize "Form Union"

Materials
  mat1: Common "NaCl [liquid]" on domains 2
    def "Basic"
      thermalconductivity = k_liquid_2(T[1/K])[W/(m*K)]
      heatcapacity = C_liquid_2(T[1/K])[J/(kg*K)]
      HC = HC_liquid_2(T[1/K])[J/(mol*K)]
      k_liquid_2: Piecewise | arg = T; extrap = constant; pieces = {1074.0, 1275.0, 0.469292-5.8E-5*T^1}
      C_liquid_2: Piecewise "Piecewise 2a" | arg = T; extrap = constant; pieces = {1074.0, 1300.0, 1145.517}
      HC_liquid_2: Piecewise "Piecewise 2b" | arg = T; extrap = constant; pieces = {1074.0, 1300.0, 66.944}
  mat2: Common "Water" on domains 1
    def "Basic"
      dynamicviscosity = eta(T[1/K])[Pa*s]
      ratioofspecificheat = 1.0
      electricconductivity = 5.5e-6[S/m]
      heatcapacity = Cp(T[1/K])[J/(kg*K)]
      density = rho(T[1/K])[kg/m^3]
      thermalconductivity = k(T[1/K])[W/(m*K)]
      soundspeed = cs(T[1/K])[m/s]
      eta: Piecewise
        arg = T
        extrap = constant
        pieces = 
          {273.15, 413.15, 1.3799566804-0.021224019151*T^1+1.3604562827E-4*T^2-4.6454090319E-7*T^3+8.9042735735E-10*T^4-9.0790692686E-13*T^5+3.8457331488E-16*T^6}
          {413.15, 553.75, 0.00401235783-2.10746715E-5*T^1+3.85772275E-8*T^2-2.39730284E-11*T^3}
      Cp: Piecewise | arg = T; extrap = constant; pieces = {273.15, 553.75, 12010.1471-80.4072879*T^1+0.309866854*T^2-5.38186884E-4*T^3+3.62536437E-7*T^4}
      rho: Piecewise | arg = T; extrap = constant; pieces = {273.15, 553.75, 838.466135+1.40050603*T^1-0.0030112376*T^2+3.71822313E-7*T^3}
      k: Piecewise | arg = T; extrap = constant; pieces = {273.15, 553.75, -0.869083936+0.00894880345*T^1-1.58366345E-5*T^2+7.97543259E-9*T^3}
      cs: Interpolation | source = table; table = {{273, 1403}, {278, 1427}, {283, 1447}, {293, 1481}, {303, 1507}, {313, 1526}, {323, 1541}, {333, 1552}, {343, 1555}, {353, 1555}, {363, 1550}, {373, 1543}}; interp = piecewisecubic; extrap = const

Physics
  tds: DilutedSpecies "Transport of Diluted Species" on all domains
    dependent variable c
    cdm1: ConvectionDiffusionMigration "Transport Properties 1" (default) | DiffusionMaterialList = mat1
    nflx1: NoFlux (default)
    init1: init "Initial Values 1" (default)
    init2: init "Initial Values 2" on domains 2 | initc = 1e3
    open1: OpenBoundary on boundaries 1-3, 20

Mesh
  mesh1 "Mesh 1" (physics-controlled)
    size: MeshSizeDefault | hauto = 5

Studies
  std1 "Study 1"
    time: Transient "Time Dependent" | tlist = range(0,0.01,1)

Solver configurations
  sol1 "Solution 1" (study std1)
    v1: Variables "Dependent Variables 1"
    t1: Time "Time-Dependent Solver 1"
      tlist = range(0,0.01,1)
      atolglobalmethod = scaled
      atolglobal = 0.001
      maxorder = 2
      fc1: FullyCoupled | linsolver = d1; maxiter = 8; damp = 0.9; jtech = once
      d1: Direct | linsolver = pardiso

Datasets
  dset1: Solution | solution = sol1

Plots
  pg1: PlotGroup2D "Concentration (tds)" | data = dset1; animating = off
    surf1: Surface | expr = c
    con1: Contour | expr = c